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/batch
! ANSYS input file written by Workbench version 19.2 RELEASE
! File used for geometry attach: C:\Users\DELL\Downloads\CodeAlphaInternship\Structural Analys wing_files\dp0\SYS\DM\SYS.scdoc
/title,Structural Analys wing--Structure statique (A5)
/com,--- Data in consistent NMM units. See Solving Units in the help system for more information.
/units,MPA
/prep7
! Turn off shape checking because checks already performed inside WB mesher.
! See help system for more information.
SHPP,OFF,,NOWARN
etcon,set             ! allow ANSYS to choose best KEYOP's for 180x elements
/com,*********** Nodes for the whole assembly ***********
nblock,3,,1337
(1i9,3e20.9e3)
        1     7.846535777E+02     4.685187498E+02     2.834475631E+01
        2     7.843118437E+02     4.666583700E+02     2.845032136E+01
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-1
/com,*********** Elements for Body 1 "SYS\Corps principal" ***********
et,1,186
keyo,1,2,1          ! set full integration on SOLID186
eblock,19,solid,,189
(19i9)
        1        1        1        1        0        0        0        0       20        0        1        1      336      335      326       42      348      349      342
      357     1192     1171      356      520     1213     1207      518      355     1195     1193     1172
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-1
/com,*********** Send User Defined Coordinate System(s) ***********
csys,0
toffst,273.15,  ! Temperature offset from absolute zero
/com,*********** Set Reference Temperature ***********
tref,22.
/com,*********** Send Materials ***********
Temperature = 'TEMP' ! Temperature
MP,DENS,1,4.62e-09,	! tonne mm^-3
MP,ALPX,1,9.4e-06,	! C^-1
MP,C,1,522000000,	! mm^2 s^-2 C^-1
MP,KXX,1,21.9,	! tonne mm s^-3 C^-1
MP,RSVX,1,0.0017,	! ohm mm
MP,EX,1,96000,	! tonne s^-2 mm^-1
MP,NUXY,1,0.36,
MP,MURX,1,1,

!************************* Model Summary ********************
!SYS\Corps principal,	Alliage de titane,	matid,	1
!************************* End Model Summary ********************
/com,*********** Fixed Supports ***********
CMBLOCK,_FIXEDSU,NODE,       40
(8i10)
        43        44        45        46        47        48        49        50
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
cmsel,s,_FIXEDSU
d,all,all
nsel,all
/com,*********** Define Pressure Using Surface Effect Elements ***********
et,2,154
eblock,10,,,152
(15i9)
      190        2        2        2        0      174      192      324      173      886      922      883      882
      191        2        2        2        0      175      199      192      174      888      921      886      885
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-1
esel,s,type,,2
esel,all
esel,all
fini
/com,****************************************************************************
/com,*************************    SOLUTION       ********************************
/com,****************************************************************************
/solu
antype,0                   ! static analysis
eqsl,sparse,,,,,1
cntr,print,1               ! print out contact info and also make no initial contact an error
dmpoption,emat,no             ! Don't combine emat file for DANSYS
dmpoption,esav,no             ! Don't combine esav file for DANSYS
nldiag,cont,iter           ! print out contact info each equilibrium iteration
rescontrol,,none                 ! Do not keep any restart files
/com,****************************************************
/com,******************* SOLVE FOR LS 1 OF 1 ****************
esel,s,type,,2
nsle
sf,all,pres,1.e-003
nsel,all
esel,all
esel,all
nsub,1,1,1
time,1.
outres,erase
outres,all,none
outres,nsol,all,
outres,rsol,all
outres,strs,all,
outres,epel,all,
outres,eppl,all,
stabilize,off                   ! Stabilization turned OFF by user
! *********** WB SOLVE COMMAND ***********
! check interactive state
*get,ANSINTER_,active,,int
*if,ANSINTER_,ne,0,then
/eof
*endif
solve
/com *************** Write FE CONNECTORS *********
CEWRITE,file,ce,,INTE
/com,****************************************************
/com,*************** FINISHED SOLVE FOR LS 1 *************
/post1
fini
